// COMSOL Multiphysics 5.4.0.388 model "CLEARED_infinite-gaussian y polarization - symmetric 0.25 - having Si on bottom.mph"
// Outline of the model tree

Parameters
  t_pml = 100[nm]  // PML thickness
  h_air = 600[nm]  // Air domain height
  h_subs = 300[nm]  // Substrate domain height
  na = 1  // Refractive index, air
  nb = sqrt(2)  // Refractive index, substrate
  wl = 785[nm]  // Wavelength
  phi = 0  // Azimuthal angle of incidence in both media
  theta = 0  // Polar angle of incidence in air
  P0 = 1[mW]  // Port power
  E0 = 1[V/m]
  w0 = 0.9[um]
  zR = pi*na*w0^2/wl
  k = 2*pi*na/wl
  I0 = 2*P0/(pi*w0^2)
  h_si = 200[nm]

Functions
  an1: Analytic | funcname = w; expr = w0*sqrt(1+(z/zR)^2); args = z; argunit = m; fununit = m
  an2: Analytic | funcname = R; expr = z*(1+(zR/z)^2); args = z; argunit = m; fununit = m
  an3: Analytic | funcname = eta; expr = atan2(z,zR); args = z; argunit = m

Variables
  var1 "Variables 1" on selection com1
    ewfd.Ex = 0
    ewfd.Ey = 0
    ewfd.Ez = 0
  var3 "Variables 3"
    nrelPoav = nx*ewfd2.relPoavx+ny*ewfd2.relPoavy+nz*ewfd2.relPoavz  // Relative normal Poynting flux
    sigma_sc = intop_surf(nrelPoav)  // Scattering cross section
    sigma_abs = intop_vol(ewfd2.Qh)  // Absorption cross section
    sigma_ext = sigma_sc+sigma_abs  // Extinction cross section

Selections
  sel1: Explicit "Physical Domains" on domains 14, 15, 18
  com1: Complement "PML Domains" | entitydim = 3; input = {sel1}
  sel2: Explicit "Nanoparticle" on domains 18
  sel3: Explicit "Nanoparticle Surface" on boundaries adjacent to domains 18

Couplings
  intop1: Integration on domains 18 | opname = intop_vol
  intop2: Integration on selection sel3 | opname = intop_surf

Coordinate systems
  pml1: PML "Perfectly Matched Layer 1" on selection com1 | wavelengthSource = ewfd2

Geometry
  geom1 "Geometry 1" (3D, length unit nm)
    imp1: Import
      type = native
      filename = E:\Comsol Simulations\Mahdiyeh\single crystal thermocouple\Paper simulations\Geometry files\infinite particle_large region.mphbin
      meshfilename = E:\Comsol Simulations\Mahdiyeh\single crystal thermocouple\Paper simulations\Geometry files\infinite particle_large region.mphbin
    mov1: Move | input = imp1; displz = 100[nm]
    blk1: Block | pos = {-1250-t_pml, -1250-t_pml, -1250}; size = {1250+t_pml, 2500+2*t_pml, 2500}
    int1: Intersection | input = blk1, mov1(1)
    blk2: Block | pos = {-(1250+t_pml), -(1250+t_pml), -1000}; size = {1250+t_pml, 1250+t_pml, 2000}
    int2: Intersection | input = blk2, int1
    fin: Finalize "Form Union"

Materials
  mat1: Common "Air" on domains 1-17
    RefractiveIndex
      n = na
      ki = 0
  mat2: Common "Substrate" on domains 3, 4, 7, 8, 11, 12, 15, 16
    RefractiveIndex
      n = nb
      ki = 0
  mat3: Common "Au (Rakic)" on domains 17, 18
    RefractiveIndex
      n = n_interp(1[1/m]*c_const/freq)
      ki = k_interp(1[1/m]*c_const/freq)
      n_interp: Interpolation
        table = 
          {2.066e-07, 1.25223320824}
          {2.1089508319E-7, 1.28860501667}
          {2.15279458439E-7, 1.32053986347}
          {2.19754982075E-7, 1.34888336249}
          {2.24323549012E-7, 1.3746284289}
          {2.28987093564E-7, 1.39882611415}
          {2.33747590255E-7, 1.42248550103}
          {2.38607054657E-7, 1.44647562039}
          {2.43567544248E-7, 1.47144312879}
          {2.48631159276e-07, 1.49775668894}
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        interp = piecewisecubic
      k_interp: Interpolation
        table = 
          {2.066e-07, 1.98591656445}
          {2.1089508319E-7, 1.97534779229}
          {2.15279458439E-7, 1.96597777856}
          {2.19754982075E-7, 1.95853718525}
          {2.24323549012E-7, 1.95347479861}
          {2.28987093564E-7, 1.95092054945}
          {2.33747590255E-7, 1.95067979422}
          {2.38607054657E-7, 1.9522622682}
          {2.43567544248E-7, 1.95494272809}
          {2.48631159276e-07, 1.95784420876}
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        interp = piecewisecubic

Physics
  ewfd: ElectromagneticWavesFrequencyDomain on selection sel1
    dependent variable E = {Ex, Ey, Ez}
    MeshControl.EnableMeshControl = 0
    wee1: WaveEquationElectric (default)
    pec1: PerfectElectricConductor (default)
    init1: init "Initial Values 1" (default)
    wee2: WaveEquationElectric on selection sel2 | n_mat = userdef; n = na; ki_mat = userdef; ki = 0
    port1: Port on boundaries 49
      Pin = P0/4
      PortType = UserDefined
      beta = 2*pi*na/wl
      E0 = {0, E0*w0/w(z)*exp(-(y^2+x^2)/w(z)^2)*exp(-i*(-eta(z)+k*(y^2+x^2)/(2*R(z)))), 0}
      Eampl = {E0x, E0y, 0}
      alpha1_inc = theta
      alpha2_inc = phi
      n = na
    port2: Port on boundaries 55
      PortType = UserDefined
      beta = 2*pi*nb/wl
      E0 = {0, E0*w0/w(z)*exp(-(y^2+x^2)/w(z)^2)*exp(-i*(-eta(z)+k*(y^2+x^2)/(2*R(z)))), 0}
      Eampl = {E0*w0/w(z)*exp(-(y^2+x^2)/w(z)^2)*exp(-i*(-eta(z)+k*(y^2+x^2)/(2*R(z)))), 0, 0}
      n = nb
    pec2: PerfectElectricConductor on boundaries 48, 51, 58, 59, 66, 69
    pmc1: PerfectMagneticConductor on boundaries 78-80
  ewfd2: ElectromagneticWavesFrequencyDomain on all domains
    dependent variable E2 = {E2x, E2y, E2z}
    BackgroundField.SolveFor = scatteredField
    BackgroundField.Eb = {ewfd.Ex, ewfd.Ey, ewfd.Ez}
    MeshControl.EnableMeshControl = 0
    wee1: WaveEquationElectric (default)
    pec1: PerfectElectricConductor (default)
    init1: init "Initial Values 1" (default)
    pec2: PerfectElectricConductor on boundaries 2, 5, 8, 11, 27-30, 32, 35, 38, 41, 57-60, 62, 69
    pmc1: PerfectMagneticConductor on boundaries 1, 4, 7, 10, 14, 17, 20, 23, 72-81

Mesh
  mesh1 "Mesh 1"
    size: MeshSizeDefault | hmax = wl/6; hmin = 18.9; custom = on
    size1: Size on selection sel2 | hmax = 43[nm]; custom = on
    size2: Size on domains 15 | hmax = wl/6/nb; custom = on
    ftri1: FreeTri "Free Triangular 1" on boundaries 58, 59, 69
    ftri2: FreeTri "Free Triangular 2" on boundaries 78-80
    ftet1: FreeTet "Free Tetrahedral 1" on selection sel1
    swe1: Sweep "Swept 1" on remaining entities
      dis1: Distribution on all domains | numelem = 8

Studies
  std1 "Study 1"
    param: Parametric "Parametric Sweep" | pname = {theta, phi}; plistarr = {0, 0}; punit = {, }
    wave: Wavelength "Wavelength Domain" | plist = wl; solve for = {ewfd}
    wave2: Wavelength "Wavelength Domain 2" | plist = wl; solve for = {ewfd2}

Tables
  tbl1: Table
    // Global Evaluation 1 (ewfd.Rport_1)
    theta | phi | lambda0 (µm) | Reflectance, port 1 (1)
    0 | 0 | 0.5 | 0.0400479
    0.523599 | 0 | 0.5 | 0.0575528
    0.523599 | 0.785398 | 0.5 | 0.0575528
    0.785398 | 0.785398 | 0.5 | 0.0937039
  tbl2: Table
    // Global Evaluation 2 (sigma_ext, sigma_sc, sigma_abs)
    lambda0 (µm) | Extinction cross section (m^2) | Scattering cross section (m^2) | Absorption cross section (m^2)
    0.785 | 7.11713e-13 | 6.91927e-13 | 1.97866e-14
  tbl3: Table
    // Global Evaluation 1 (sigma_sc, sigma_abs, sigma_ext)
    theta | phi | lambda0 (µm) | Scattering cross section (m^2) | Absorption cross section (m^2) | Extinction cross section (m^2) | Scattering cross section (W) | Absorption cross section (W) | Extinction cross section (W)
    0 | 0 | 0.785 | 6.91805e-13 | 1.9801e-14 | 7.11606e-13 | 0.000292255 | 6.06404e-06 | 0.000298319